# 3*X3-X7 = 0
# -4*X2-4*X3 = 0
# -4*X2+X3 = 0
# X2 - 2*X4 - 2*X5 - 2*X6 = -60
# 3*X3 +2*X5 + 2*X8 = 20
# -3*X3 +2*X4 - 4*X5 = -30
# - X2 - 5*X3 - X4 = -5
# - 3*X1 + X8 = 0
ORIGIN := 1
A := [
    0, 0, 3, 0, 0, 0, -1, 0;
    0, -4, -4, 0, 0, 0, 0, 0;
    0, -4, 1, 0, 0, 0, 0, 0;
    0, 1, 0, -2, -2, -2, 0, 0;
    0, 0, 3, 0, 2, 0, 0, 2;
    0, 0, -3, 2, -4, 0, 0, 0;
    0, -1, -5, -1, 0, 0, 0, 0;
    -3, 0, 0, 0, 0, 0, 0, 1
]
A := [
    0, 0, 3, 0, 0, 0, -1, 0;
    0, -4, -4, 0, 0, 0, 0, 0;
    0, -4, 1, 0, 0, 0, 0, 0;
    0, 1, 0, -2, -2, -2, 0, 0;
    0, 0, 3, 0, 2, 0, 0, 2;
    0, 0, -3, 2, -4, 0, 0, 0;
    0, -1, -5, -1, 0, 0, 0, 0;
    -3, 0, 0, 0, 0, 0, 0, 1
]
B := [0; 0; 0; -60; 20; -30; -5; 0]
A^-1 = [
    0, -0.125, 0.0833333, 0, 0.166667, 0.0833333, 0.166667, -0.333333;
    0, -0.05, -0.2, 0, 0, 0, 0, 0;
    0, -0.2, 0.2, 0, 0, 0, 0, 0;
    0, 1.05, -0.8, 0, 0, 0, -1, 0;
    0, 0.675, -0.55, 0, 0, -0.25, -0.5, 0;
    0, -1.75, 1.25, -0.5, 0, 0.25, 1.5, 0;
    -1, -0.6, 0.6, 0, 0, 0, 0, 0;
    0, -0.375, 0.25, 0, 0.5, 0.25, 0.5, 0
]
X := A^-1*B = [0; 0; 0; 5; 10; 15; 0; 0]
A*X := B = [0; 0; 0; -60; 20; -30; -5; 0]  # error: Здесь необходимо указать имя.
Δ := |A| = -960
C_1 := submatrix(A, 1, 8, 2, 8) = [
    0, 3, 0, 0, 0, -1, 0;
    -4, -4, 0, 0, 0, 0, 0;
    -4, 1, 0, 0, 0, 0, 0;
    1, 0, -2, -2, -2, 0, 0;
    0, 3, 0, 2, 0, 0, 2;
    0, -3, 2, -4, 0, 0, 0;
    -1, -5, -1, 0, 0, 0, 0;
    0, 0, 0, 0, 0, 0, 1
]
A_1 := augment(B, C_1) = [
    0, 0, 3, 0, 0, 0, -1, 0;
    0, -4, -4, 0, 0, 0, 0, 0;
    0, -4, 1, 0, 0, 0, 0, 0;
    -60, 1, 0, -2, -2, -2, 0, 0;
    20, 0, 3, 0, 2, 0, 0, 2;
    -30, 0, -3, 2, -4, 0, 0, 0;
    -5, -1, -5, -1, 0, 0, 0, 0;
    0, 0, 0, 0, 0, 0, 0, 1
]
Δ_1 := |A_1| = 2.66454e-13
X_1 := Δ_1/Δ = -2.77556e-16
A_1 := A
A_1[:, 1] := B
A_1 = [
    0, 0, 3, 0, 0, 0, -1, 0;
    0, -4, -4, 0, 0, 0, 0, 0;
    0, -4, 1, 0, 0, 0, 0, 0;
    -60, 1, 0, -2, -2, -2, 0, 0;
    20, 0, 3, 0, 2, 0, 0, 2;
    -30, 0, -3, 2, -4, 0, 0, 0;
    -5, -1, -5, -1, 0, 0, 0, 0;
    0, 0, 0, 0, 0, 0, 0, 1
]
A_1 := A
i := 1 .. 8
A_1[i, 1] := B[i, 1]
A_1 = [
    0, 0, 3, 0, 0, 0, -1, 0;
    0, -4, -4, 0, 0, 0, 0, 0;
    0, -4, 1, 0, 0, 0, 0, 0;
    -60, 1, 0, -2, -2, -2, 0, 0;
    20, 0, 3, 0, 2, 0, 0, 2;
    -30, 0, -3, 2, -4, 0, 0, 0;
    -5, -1, -5, -1, 0, 0, 0, 0;
    0, 0, 0, 0, 0, 0, 0, 1
]
C_2 := submatrix(A, 1, 8, 3, 8) = [
    3, 0, 0, 0, -1, 0;
    -4, 0, 0, 0, 0, 0;
    1, 0, 0, 0, 0, 0;
    0, -2, -2, -2, 0, 0;
    3, 0, 2, 0, 0, 2;
    -3, 2, -4, 0, 0, 0;
    -5, -1, 0, 0, 0, 0;
    0, 0, 0, 0, 0, 1
]
C_22 := submatrix(A, 1, 8, 1, 1) = [0; 0; 0; 0; 0; 0; 0; -3]
A_2 := augment(C_22, B, C_2) = [
    0, 0, 3, 0, 0, 0, -1, 0;
    0, 0, -4, 0, 0, 0, 0, 0;
    0, 0, 1, 0, 0, 0, 0, 0;
    0, -60, 0, -2, -2, -2, 0, 0;
    0, 20, 3, 0, 2, 0, 0, 2;
    0, -30, -3, 2, -4, 0, 0, 0;
    0, -5, -5, -1, 0, 0, 0, 0;
    -3, 0, 0, 0, 0, 0, 0, 1
]
Δ_2 := |A_2| = -3.9968e-14
X_2. := Δ_2/Δ = 4.16334e-17
C_3 := submatrix(A, 1, 8, 4, 8) = [
    0, 0, 0, -1, 0;
    0, 0, 0, 0, 0;
    0, 0, 0, 0, 0;
    -2, -2, -2, 0, 0;
    0, 2, 0, 0, 2;
    2, -4, 0, 0, 0;
    -1, 0, 0, 0, 0;
    0, 0, 0, 0, 1
]
C_33 := submatrix(A, 1, 8, 1, 2) = [0, 0; 0, -4; 0, -4; 0, 1; 0, 0; 0, 0; 0, -1; -3, 0]
A_3 := augment(C_33, B, C_3) = [
    0, 0, 0, 0, 0, 0, -1, 0;
    0, -4, 0, 0, 0, 0, 0, 0;
    0, -4, 0, 0, 0, 0, 0, 0;
    0, 1, -60, -2, -2, -2, 0, 0;
    0, 0, 20, 0, 2, 0, 0, 2;
    0, 0, -30, 2, -4, 0, 0, 0;
    0, -1, -5, -1, 0, 0, 0, 0;
    -3, 0, 0, 0, 0, 0, 0, 1
]
Δ_3 := |A_3| = 0
X_3 := Δ_3/Δ = 0
C_4 := submatrix(A, 1, 8, 5, 8) = [0, 0, -1, 0; 0, 0, 0, 0; 0, 0, 0, 0; -2, -2, 0, 0; 2, 0, 0, 2; -4, 0, 0, 0; 0, 0, 0, 0; 0, 0, 0, 1]
C_44 := submatrix(A, 1, 8, 1, 3) = [0, 0, 3; 0, -4, -4; 0, -4, 1; 0, 1, 0; 0, 0, 3; 0, 0, -3; 0, -1, -5; -3, 0, 0]
A_4 := augment(C_44, B, C_4) = [
    0, 0, 3, 0, 0, 0, -1, 0;
    0, -4, -4, 0, 0, 0, 0, 0;
    0, -4, 1, 0, 0, 0, 0, 0;
    0, 1, 0, -60, -2, -2, 0, 0;
    0, 0, 3, 20, 2, 0, 0, 2;
    0, 0, -3, -30, -4, 0, 0, 0;
    0, -1, -5, -5, 0, 0, 0, 0;
    -3, 0, 0, 0, 0, 0, 0, 1
]
Δ_4 := |A_4| = -4800
X_4 := Δ_4/Δ = 5
C_5 := submatrix(A, 1, 8, 6, 8) = [0, -1, 0; 0, 0, 0; 0, 0, 0; -2, 0, 0; 0, 0, 2; 0, 0, 0; 0, 0, 0; 0, 0, 1]
C_55 := submatrix(A, 1, 8, 1, 4) = [
    0, 0, 3, 0;
    0, -4, -4, 0;
    0, -4, 1, 0;
    0, 1, 0, -2;
    0, 0, 3, 0;
    0, 0, -3, 2;
    0, -1, -5, -1;
    -3, 0, 0, 0
]
A_5 := augment(C_55, B, C_5) = [
    0, 0, 3, 0, 0, 0, -1, 0;
    0, -4, -4, 0, 0, 0, 0, 0;
    0, -4, 1, 0, 0, 0, 0, 0;
    0, 1, 0, -2, -60, -2, 0, 0;
    0, 0, 3, 0, 20, 0, 0, 2;
    0, 0, -3, 2, -30, 0, 0, 0;
    0, -1, -5, -1, -5, 0, 0, 0;
    -3, 0, 0, 0, 0, 0, 0, 1
]
Δ_5 := |A_5| = -9600
X_5 := Δ_5/Δ = 10
C_6 := submatrix(A, 1, 8, 1, 5) = [
    0, 0, 3, 0, 0;
    0, -4, -4, 0, 0;
    0, -4, 1, 0, 0;
    0, 1, 0, -2, -2;
    0, 0, 3, 0, 2;
    0, 0, -3, 2, -4;
    0, -1, -5, -1, 0;
    -3, 0, 0, 0, 0
]
C_66 := submatrix(A, 1, 8, 7, 8) = [-1, 0; 0, 0; 0, 0; 0, 0; 0, 2; 0, 0; 0, 0; 0, 1]
A_6 := augment(C_6, B, C_66) = [
    0, 0, 3, 0, 0, 0, -1, 0;
    0, -4, -4, 0, 0, 0, 0, 0;
    0, -4, 1, 0, 0, 0, 0, 0;
    0, 1, 0, -2, -2, -60, 0, 0;
    0, 0, 3, 0, 2, 20, 0, 2;
    0, 0, -3, 2, -4, -30, 0, 0;
    0, -1, -5, -1, 0, -5, 0, 0;
    -3, 0, 0, 0, 0, 0, 0, 1
]
Δ_6 := |A_6| = -14400
X_6 := Δ_6/Δ = 15
X = [0; 0; 0; 5; 10; 15; 0; 0]
C_7 := submatrix(A, 1, 8, 8, 8) = [0; 0; 0; 0; 2; 0; 0; 1]
C_77 := submatrix(A, 1, 8, 1, 6) = [
    0, 0, 3, 0, 0, 0;
    0, -4, -4, 0, 0, 0;
    0, -4, 1, 0, 0, 0;
    0, 1, 0, -2, -2, -2;
    0, 0, 3, 0, 2, 0;
    0, 0, -3, 2, -4, 0;
    0, -1, -5, -1, 0, 0;
    -3, 0, 0, 0, 0, 0
]
A = [
    0, 0, 3, 0, 0, 0, -1, 0;
    0, -4, -4, 0, 0, 0, 0, 0;
    0, -4, 1, 0, 0, 0, 0, 0;
    0, 1, 0, -2, -2, -2, 0, 0;
    0, 0, 3, 0, 2, 0, 0, 2;
    0, 0, -3, 2, -4, 0, 0, 0;
    0, -1, -5, -1, 0, 0, 0, 0;
    -3, 0, 0, 0, 0, 0, 0, 1
]
A_7 := augment(C_77, B, C_7) = [
    0, 0, 3, 0, 0, 0, 0, 0;
    0, -4, -4, 0, 0, 0, 0, 0;
    0, -4, 1, 0, 0, 0, 0, 0;
    0, 1, 0, -2, -2, -2, -60, 0;
    0, 0, 3, 0, 2, 0, 20, 2;
    0, 0, -3, 2, -4, 0, -30, 0;
    0, -1, -5, -1, 0, 0, -5, 0;
    -3, 0, 0, 0, 0, 0, 0, 1
]
Δ_7 := |A_7| = 0
X_7 := Δ_7/Δ = 0
C_8 := submatrix(A, 1, 8, 1, 7) = [
    0, 0, 3, 0, 0, 0, -1;
    0, -4, -4, 0, 0, 0, 0;
    0, -4, 1, 0, 0, 0, 0;
    0, 1, 0, -2, -2, -2, 0;
    0, 0, 3, 0, 2, 0, 0;
    0, 0, -3, 2, -4, 0, 0;
    0, -1, -5, -1, 0, 0, 0;
    -3, 0, 0, 0, 0, 0, 0
]
A_8 := augment(C_8, B) = [
    0, 0, 3, 0, 0, 0, -1, 0;
    0, -4, -4, 0, 0, 0, 0, 0;
    0, -4, 1, 0, 0, 0, 0, 0;
    0, 1, 0, -2, -2, -2, 0, -60;
    0, 0, 3, 0, 2, 0, 0, 20;
    0, 0, -3, 2, -4, 0, 0, -30;
    0, -1, -5, -1, 0, 0, 0, -5;
    -3, 0, 0, 0, 0, 0, 0, 0
]
Δ_8 := |A_8| = 8.52651e-13
X_8 := Δ_8/Δ = -8.88178e-16
X = [0; 0; 0; 5; 10; 15; 0; 0]
