R_1 := 500
R_2 := 1000
R_3 := 400
L := 1
C := 40*10^-6
E := 150
t_max := 1
Given
L*(d/dt(i_2(t))) == U_C(t)
C*(d/dt(U_C(t))) == E/(R_1 + R_3) - i_2(t) - U_C(t)*(1/(R_1 + R_3) + 1/R_2)
i_2(0) == 0
U_C(0) == 0
[i_2; U_C] := Odesolve([i_2; U_C], t, t_max)
t := 0, 0.001 .. t_max
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R_1 := 500
R_2 := 1000
R_3 := 400
L := 1
C := 40*10^-6
E := 150
ORIGIN := 1
D(t, Y) := [(E/(R_1 + R_3) - Y[2] - Y[1]*(1/(R_1 + R_3) + 1/R_2))/C; 1/L*Y[1]]
y_0 := [0; 0]
t_min := 0
t_max := 1
N := 5000
Z := rkfixed(y_0, t_min, t_max, N, D)
t_1 := Z[:, 1]
U_C1 := Z[:, 2]
i_L1 := Z[:, 3]
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