E := 50
R_1 := 35
R_2 := 15
R_3 := 35
R_4 := 10
R_6 := 30
η_1 := 0, 04
R_124 := R_1 + R_2 + R_4
R_356(R_5) := R_6*(R_5 + R_3)/(R_6 + R_5 + R_3)
R_э(R_5) := R_1 + R_2 + R_4 + R_6*(R_5 + R_3)/(R_6 + R_5 + R_3)
I_1(R_5) := E/R_э(R_5)
U_1(R_5) := I_1(R_5)*R_356(R_5)
I_2(R_5) := U_1(R_5)/(R_5 + R_3)
P_5(R_5) := I_2(R_5)^2*R_5
P_s(R_5) := I_1(R_5)*E
η(R_5) := P_5(R_5)/P_s(R_5)
R_5 := 0 .. 100
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f(R_5) := d/dR_5(P_5(R_5))
x := 0
y := root(f(x), x)
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f_1(R_5) := 0.04 - η(R_5)
x_1 := 0
y_1 := root(f_1(x_1), x_1)
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