R_1 := 15
R_2 := 27
R_3 := 7, 5
R_4 := 15
R_5 := 12
R_6 := 9
E_1 := 0
E_2 := 43.5
E_3 := 52.5
E_к1 := 0
E_к2 := 13.5
ORIGIN := 1
A := [
    0, 1, 0, 1, 0, -1;
    -1, -1, 0, 0, 1, 0;
    1, 0, -1, 0, 0, 1;
    0, 27, 0, -15, 12, 0;
    0, 0, 7.5, 15, 0, 9;
    15, -27, 0, 0, 0, -9
]
B := [0; 0; 0; 30; 52.5; -30]
A^-1 = [
    0.0348721, -0.290933, 0.164397, 0.0242444, 0.0219196, 0.0363113;
    0.156094, -0.159415, 0.0215875, 0.0132846, 0.00287833, -0.0120669;
    -0.375291, -0.297576, -0.62637, 0.024798, 0.0498173, 0.0219196;
    0.433743, 0.152773, 0.187645, -0.0127311, 0.0250194, -0.00232481;
    0.190966, 0.549651, 0.185985, 0.0375291, 0.024798, 0.0242444;
    -0.410163, -0.00664231, 0.209233, 0.000553526, 0.0278977, -0.0143917
]
X := A^-1*B = [0.788774; 0.911657; 2.70176; 1.00133; 1.70043; 1.91299]
B := A*X = [0; 0; 0; 30; 52.5; -30]
C_1 := submatrix(A, 1, 6, 2, 6) = [
    1, 0, 1, 0, -1;
    -1, 0, 0, 1, 0;
    0, -1, 0, 0, 1;
    27, 0, -15, 12, 0;
    0, 7.5, 15, 0, 9;
    -27, 0, 0, 0, -9
]
A_1 := augment(B, C_1) = [
    0, 1, 0, 1, 0, -1;
    0, -1, 0, 0, 1, 0;
    0, 0, -1, 0, 0, 1;
    30, 27, 0, -15, 12, 0;
    52.5, 0, 7.5, 15, 0, 9;
    -30, -27, 0, 0, 0, -9
]
Δ := |A| = -40648.5
Δ_1 := |A_1| = -32062.5
X_1 := Δ_1/Δ = 0.788774
A_1 := A
A_1[:, 1] := B
X = [0.788774; 0.911657; 2.70176; 1.00133; 1.70043; 1.91299]
A_1 = [
    0, 1, 0, 1, 0, -1;
    0, -1, 0, 0, 1, 0;
    0, 0, -1, 0, 0, 1;
    30, 27, 0, -15, 12, 0;
    52.5, 0, 7.5, 15, 0, 9;
    -30, -27, 0, 0, 0, -9
]
A_1 := A
i := 1 .. 6
A_1[i, 1] := B[i, 1]
A_1 = [
    0, 1, 0, 1, 0, -1;
    0, -1, 0, 0, 1, 0;
    0, 0, -1, 0, 0, 1;
    30, 27, 0, -15, 12, 0;
    52.5, 0, 7.5, 15, 0, 9;
    -30, -27, 0, 0, 0, -9
]
C_2 := submatrix(A, 1, 6, 3, 6) = [0, 1, 0, -1; 0, 0, 1, 0; -1, 0, 0, 1; 0, -15, 12, 0; 7.5, 15, 0, 9; 0, 0, 0, -9]
C_22 := submatrix(A, 1, 6, 1, 1) = [0; -1; 1; 0; 0; 15]
A_2 := augment(C_22, B, C_2) = [
    0, 0, 0, 1, 0, -1;
    -1, 0, 0, 0, 1, 0;
    1, 0, -1, 0, 0, 1;
    0, 30, 0, -15, 12, 0;
    0, 52.5, 7.5, 15, 0, 9;
    15, -30, 0, 0, 0, -9
]
Δ_2 := |A_2| = -37057.5
X_2. := Δ_2/Δ = 0.911657
C_3 := submatrix(A, 1, 6, 4, 6) = [1, 0, -1; 0, 1, 0; 0, 0, 1; -15, 12, 0; 15, 0, 9; 0, 0, -9]
C_33 := submatrix(A, 1, 6, 1, 2) = [0, 1; -1, -1; 1, 0; 0, 27; 0, 0; 15, -27]
A_3 := augment(C_33, B, C_3) = [
    0, 1, 0, 1, 0, -1;
    -1, -1, 0, 0, 1, 0;
    1, 0, 0, 0, 0, 1;
    0, 27, 30, -15, 12, 0;
    0, 0, 52.5, 15, 0, 9;
    15, -27, -30, 0, 0, -9
]
Δ_3 := |A_3| = -109823
X_3 := Δ_3/Δ = 2.70176
C_4 := submatrix(A, 1, 6, 5, 6) = [0, -1; 1, 0; 0, 1; 12, 0; 0, 9; 0, -9]
C_44 := submatrix(A, 1, 6, 1, 3) = [0, 1, 0; -1, -1, 0; 1, 0, -1; 0, 27, 0; 0, 0, 7.5; 15, -27, 0]
A_4 := augment(C_44, B, C_4) = [
    0, 1, 0, 0, 0, -1;
    -1, -1, 0, 0, 1, 0;
    1, 0, -1, 0, 0, 1;
    0, 27, 0, 30, 12, 0;
    0, 0, 7.5, 52.5, 0, 9;
    15, -27, 0, -30, 0, -9
]
Δ_4 := |A_4| = -40702.5
X_4 := Δ_4/Δ = 1.00133
C_5 := submatrix(A, 1, 6, 6, 6) = [-1; 0; 1; 0; 9; -9]
C_55 := submatrix(A, 1, 6, 1, 4) = [0, 1, 0, 1; -1, -1, 0, 0; 1, 0, -1, 0; 0, 27, 0, -15; 0, 0, 7.5, 15; 15, -27, 0, 0]
A_5 := augment(C_55, B, C_5) = [
    0, 1, 0, 1, 0, -1;
    -1, -1, 0, 0, 0, 0;
    1, 0, -1, 0, 0, 1;
    0, 27, 0, -15, 30, 0;
    0, 0, 7.5, 15, 52.5, 9;
    15, -27, 0, 0, -30, -9
]
Δ_5 := |A_5| = -69120
X_5 := Δ_5/Δ = 1.70043
C_6 := submatrix(A, 1, 6, 1, 5) = [
    0, 1, 0, 1, 0;
    -1, -1, 0, 0, 1;
    1, 0, -1, 0, 0;
    0, 27, 0, -15, 12;
    0, 0, 7.5, 15, 0;
    15, -27, 0, 0, 0
]
A_6 := augment(C_6, B) = [
    0, 1, 0, 1, 0, 0;
    -1, -1, 0, 0, 1, 0;
    1, 0, -1, 0, 0, 0;
    0, 27, 0, -15, 12, 30;
    0, 0, 7.5, 15, 0, 52.5;
    15, -27, 0, 0, 0, -30
]
Δ_6 := |A_6| = -77760
X_6 := Δ_6/Δ = 1.91299
X = [0.788774; 0.911657; 2.70176; 1.00133; 1.70043; 1.91299]
